<?xml version="1.0"?>

<!-- Generated by Ron Jensen using JavaProp
DESIGN CARD:
Number of blades: 2
Velocity of rotation: 2800
Diameter: 1.75
Spinner Dia DSP: 0.25
Velocity v: 55.500 m/s

v/(nD): 0.68
v/(omegaR):0.216
Efficiency n: 79.983
% loading: medium
Thrust  T: 1,369.15 N
Ct: 0.0549
Power  P: 95.01 kW
Cp: 0.0466
beta at 75% R: 20.9
Pitch H: 1.57 m

Airfoils:
r/R = 0.00; Clark Y, Re=100,000, aoa 3.00
r/R = 0.33; Clark Y, Re=100,000, aoa 3.00
r/R = 0.67; Clark Y, Re=500,000, aoa 3.00
r/R = 1.00; Clark Y, Re=100,000, aoa 3.00

-->

<propeller name="175x157">
  <ixx> 1.4 </ixx>
  <diameter unit="IN"> 68.9 </diameter>
  <numblades> 2 </numblades>
  <gearratio>2.27</gearratio>
  <ct_factor>1.0</ct_factor>
  <cp_factor>1.0</cp_factor>
  <table name="C_THRUST" type="internal">
    <tableData>
    0.00    0.086867
    0.05    0.084295
    0.10    0.089567
    0.15    0.088728
    0.20    0.087539
    0.25    0.087232
    0.30    0.086814
    0.35    0.086039
    0.40    0.084552
    0.45    0.082122
    0.50    0.078965
    0.55    0.074655
    0.60    0.067600
    0.65    0.059685
    0.70    0.051557
    0.75    0.043234
    0.80    0.034723
    0.85    0.026030
    0.86    0.024271
    0.87    0.022502
    0.88    0.020730
    0.89    0.018949
    0.90    0.017163
    0.91    0.015361
    0.92    0.013553
    0.93    0.011737
    0.94    0.009923
    0.95    0.008094
    0.96    0.006258
    0.97    0.004424
    0.98    0.002573
    0.99    0.000727
    1.00    -0.001140
    1.01    -0.002280
    1.02    -0.003420
    1.03    -0.004560
    1.04    -0.005700
    1.05    -0.006840
    1.06    -0.007980
    1.07    -0.009120
    1.08    -0.010260
    1.09    -0.011400
    1.10    -0.012540
    </tableData>
  </table>

  <table name="C_POWER" type = "internal">
    <tableData>
    0.00    0.056820
    0.05    0.055115
    0.10    0.058460
    0.15    0.057318
    0.20    0.056755
    0.25    0.056607
    0.30    0.056557
    0.35    0.056670
    0.40    0.056865
    0.45    0.056917
    0.50    0.056717
    0.55    0.055899
    0.60    0.053089
    0.65    0.049230
    0.70    0.044732
    0.75    0.039572
    0.80    0.033726
    0.85    0.027166
    0.86    0.025767
    0.87    0.024337
    0.88    0.022880
    0.89    0.021390
    0.90    0.019873
    0.91    0.018317
    0.92    0.016731
    0.93    0.015114
    0.94    0.013474
    0.95    0.011794
    0.96    0.010084
    0.97    0.008349
    0.98    0.006574
    0.99    0.004778
    1.00    -0.002936
    1.01    -0.004778
    1.02    -0.006620
    1.03    -0.008462
    1.04    -0.010304
    1.05    -0.012146
    1.06    -0.013988
    1.07    -0.015830
    1.08    -0.017672
    1.09    -0.019514
    1.10    -0.021356
    </tableData>
  </table>

<!-- thrust effects of helical tip Mach -->
<table name="CT_MACH" type="internal">
  <tableData>
    0.85   1.0
    1.05   0.8
  </tableData>
</table>

<!-- power-required effects of helical tip Mach -->
<table name="CP_MACH" type="internal">
  <tableData>
    0.85   1.0
    1.05   1.8
    2.00   1.4
  </tableData>
</table>


</propeller>
