<?xml version="1.0"?>
<?xml-stylesheet type="text/xsl" href="http://jsbsim.sourceforge.net/JSBSim.xsl"?>
<fdm_config name="c42" version="2.0" release="ALPHA"
   xmlns:xsi="http://www.w3.org/2001/XMLSchema-instance"
   xsi:noNamespaceSchemaLocation="http://jsbsim.sourceforge.net/JSBSim.xsd">

 <fileheader>
  <author> Aeromatic v 0.9 </author>
  <filecreationdate> 2009-01-04 </filecreationdate>
  <version>$Revison: $</version>
  <description> Models a c42. </description>
 </fileheader>

<!--
  File:     c42.xml
  Inputs:
    name:          c42
    type:          light single
    max weight:    992.25 lb
    wing span:     31.00545 ft
    length:        20.50625 ft
    wing area:     134.5625 sq-ft
    gear type:     tricycle
    retractable?:  no
    # engines:     1
    engine type:   piston
    engine layout: forward fuselage
    yaw damper?    no

  Outputs:
    wing loading:  7.37 lb/sq-ft
    CL-alpha:      5 per radian
    CL-0:          0.25
    CL-max:        1.4
    CD-0:          0.024
    K:             0.04

-->

 <metrics>
   <wingarea  unit="FT2">  134.56 </wingarea>
   <wingspan  unit="FT" >   31.01 </wingspan>
   <wing_incidence>          2.00 </wing_incidence>
   <chord     unit="FT" >    4.34 </chord>
   <htailarea unit="FT2">   21.53 </htailarea>
   <htailarm  unit="FT" >   10.66 </htailarm>
   <vtailarea unit="FT2">   13.46 </vtailarea>
   <vtailarm  unit="FT" >   10.25 </vtailarm>
   <location name="AERORP" unit="M">
     <x>   0.376 </x>
     <y>   0.000 </y>
     <z>   0.280 </z>
   </location>
   <location name="EYEPOINT" unit="M">
     <x>  0.62 </x>
     <y> -0.20 </y>
     <z>  0.33 </z>
   </location>
   <location name="VRP" unit="M">
     <x>0</x>
     <y>0</y>
     <z>0</z>
   </location>
 </metrics>

 <mass_balance>
  <ixx unit="SLUG*FT2">       514 </ixx>
  <iyy unit="SLUG*FT2">       212 </iyy>
  <izz unit="SLUG*FT2">       677 </izz>
  <emptywt unit="LBS" >       580 </emptywt>
  <location name="CG" unit="M">
   <x> 0.35 </x>
   <y> 0.00 </y>
   <z> 0.00 </z>
  </location>
  <pointmass name="Pilot">
   <weight unit="LBS"> 170 </weight>
   <location unit="M">
    <x> 0.400 </x>
    <y>-0.3 </y>
    <z>-0.1 </z>
   </location>
  </pointmass>
  <pointmass name="Co-Pilot">
   <weight unit="LBS"> 150 </weight>
   <location unit="M">
    <x> 0.400 </x>
    <y> 0.3 </y>
    <z>-0.1 </z>
   </location>
  </pointmass>
  <pointmass name="Under pilot seat bag">
   <weight unit="LBS"> 5 </weight>
   <location unit="M">
    <x> 0.400 </x>
    <y>-0.3 </y>
    <z>-0.4 </z>
   </location>
  </pointmass>
  <pointmass name="Under copilot seat bag">
   <weight unit="LBS"> 5 </weight>
   <location unit="M">
    <x> 0.400 </x>
    <y> 0.3 </y>
    <z>-0.4 </z>
   </location>
  </pointmass>
  <pointmass name="Samsonite case">
   <weight unit="LBS"> 25 </weight>
   <location unit="M">
    <x> 1.300 </x>
    <y> 0.0 </y>
    <z>-0.1 </z>
   </location>
  </pointmass>
 </mass_balance>

 <ground_reactions>

  <contact type="BOGEY" name="NOSE">
   <location unit="M">
     <x>  -0.82 </x>
     <y>   0.00 </y>
     <z>  -1.245 </z>
   </location>
   <orientation unit="DEG">
      <pitch>18.00 </pitch>
      <roll>  0.00 </roll>
      <yaw>   0.00 </yaw>
   </orientation>
   <static_friction>  0.80 </static_friction>
   <dynamic_friction> 0.50 </dynamic_friction>
   <rolling_friction> 0.02 </rolling_friction>
   <spring_coeff unit="LBS/FT">        600 </spring_coeff>
   <damping_coeff unit="LBS/FT/SEC">   200 </damping_coeff>
   <max_steer unit="DEG"> 360.00 </max_steer>
   <brake_group>NONE</brake_group>
   <retractable>0</retractable>
 </contact>

  <contact type="BOGEY" name="LEFT_MAIN">
   <location unit="M">
     <x> 0.576 </x>
     <y>-0.728 </y>
     <z>-1.245 </z>
   </location>
   <static_friction>  0.80 </static_friction>
   <dynamic_friction> 0.50 </dynamic_friction>
   <rolling_friction> 0.02 </rolling_friction>
   <spring_coeff unit="LBS/FT">        1200 </spring_coeff>
   <damping_coeff unit="LBS/FT/SEC">    400 </damping_coeff>
   <max_steer unit="DEG">0</max_steer>
   <brake_group>LEFT</brake_group>
   <retractable>0</retractable>
 </contact>

  <contact type="BOGEY" name="RIGHT_MAIN">
   <location unit="M">
     <x> 0.576 </x>
     <y> 0.728 </y>
     <z>-1.245 </z>
   </location>
   <static_friction>  0.80 </static_friction>
   <dynamic_friction> 0.50 </dynamic_friction>
   <rolling_friction> 0.02 </rolling_friction>
   <spring_coeff unit="LBS/FT">        1200 </spring_coeff>
   <damping_coeff unit="LBS/FT/SEC">    400 </damping_coeff>
   <max_steer unit="DEG">0</max_steer>
   <brake_group>RIGHT</brake_group>
   <retractable>0</retractable>
 </contact>

  <contact type="STRUCTURE" name="LEFT_WING">
    <location unit="M">
     <x> 0.648 </x>
     <y>-4.725 </y>
     <z> 0.559 </z>
    </location>
    <static_friction>  0.80 </static_friction>
    <dynamic_friction> 0.50 </dynamic_friction>
    <spring_coeff unit="LBS/FT">        992.25 </spring_coeff>
    <damping_coeff unit="LBS/FT/SEC">   198.45 </damping_coeff>
 </contact>

  <contact type="STRUCTURE" name="RIGHT_WING">
    <location unit="M">
     <x> 0.648 </x>
     <y> 4.725 </y>
     <z> 0.559 </z>
    </location>
    <static_friction>  0.80 </static_friction>
    <dynamic_friction> 0.50 </dynamic_friction>
    <spring_coeff unit="LBS/FT">        992.25 </spring_coeff>
    <damping_coeff unit="LBS/FT/SEC">   198.45 </damping_coeff>
 </contact>

  <contact type="STRUCTURE" name="TAIL_SKID">
    <location unit="M">
     <x> 4.1 </x>
     <y> 0.0 </y>
     <z>-0.292 </z>
    </location>
    <static_friction>  0.80 </static_friction>
    <dynamic_friction> 0.50 </dynamic_friction>
    <spring_coeff unit="LBS/FT">        992.25 </spring_coeff>
    <damping_coeff unit="LBS/FT/SEC">   198.45 </damping_coeff>
 </contact>

  <contact type="STRUCTURE" name="NOSE_SKID">
    <location unit="M">
     <x> -0.8 </x>
     <y>  0.0 </y>
     <z> -1.092 </z>
    </location>
    <static_friction>  0.80 </static_friction>
    <dynamic_friction> 0.50 </dynamic_friction>
    <spring_coeff unit="LBS/FT">        992.25 </spring_coeff>
    <damping_coeff unit="LBS/FT/SEC">   198.45 </damping_coeff>
 </contact>

 </ground_reactions>

 <propulsion>

   <engine file="Rotax912">
    <location unit="M">
      <x>-1.00 </x>
      <y> 0.00 </y>
      <z> 0.00 </z>
    </location>
    <orient unit="DEG">
      <pitch> 0.00 </pitch>
      <roll>  0.00 </roll>
      <yaw>   0.00 </yaw>
    </orient>
    <feed>0</feed>
    <thruster file="prop_175x157">
     <sense> 1 </sense>
     <location unit="M">
       <x>  -1.30 </x>
       <y>   0.00 </y>
       <z>   0.00 </z>
     </location>
     <orient unit="DEG">
       <pitch> 0.00 </pitch>
       <roll>  0.00 </roll>
       <yaw>   0.00 </yaw>
     </orient>
    </thruster>
  </engine>

  <tank type="FUEL" number="0">
     <location unit="M">
       <x> 0.950 </x>
       <y> 0.00 </y>
       <z>-0.30 </z>
     </location>
     <density unit="LBS/GAL"> 6.02 </density> <!-- Avgas -->
     <capacity unit="LBS"> 103.00 </capacity> <!-- 65 liters -->
     <contents unit="LBS">  50.00 </contents>
  </tank>

 </propulsion>

 <system file="fuzzy_dice.xml"/>

 <flight_control name="FCS: c42">

<!--
MICROLIGHT TYPE APPROVAL DATA SHEET (TADS)
            NO: BM-68 ISSUE: 8
(9)       CONTROL DEFLECTIONS:
    Elevator UP:     30 +/- 3      Tailplane trim tab UP:           1 to 5 (relative to elevator)
    Elevator DOWN:   20 +/- 3      Tailplane trim tab DOWN         25 +/- 3 (relative to elevator)
    Ailerons UP:     20 +/- 2      Rudder LEFT:                    32 +/- 3
    Ailerons DOWN:   14 +/- 2      Rudder RIGHT:                   32 +/- 3
    Flaps (DOWN):    4.5, 15 and 42 (relative to the fuselage tube)
-->

  <channel name="Pitch">
   <summer name="Pitch Trim Sum">
      <input>fcs/elevator-cmd-norm</input>
      <input>fcs/pitch-trim-cmd-norm</input>
      <clipto>
        <min> -1 </min>
        <max>  1 </max>
      </clipto>
   </summer>

   <aerosurface_scale name="Elevator Control">
      <input>fcs/pitch-trim-sum</input>
      <range>
        <min> -0.52 </min>
        <max>  0.35 </max>
      </range>
      <output>fcs/elevator-pos-rad</output>
   </aerosurface_scale>

   <aerosurface_scale name="elevator normalization">
      <input>fcs/elevator-pos-rad</input>
      <domain>
        <min> -0.52 </min>
        <max>  0.35 </max>
      </domain>
      <range>
        <min> -1 </min>
        <max>  1 </max>
      </range>
      <output>fcs/elevator-pos-norm</output>
   </aerosurface_scale>

  </channel>

  <channel name="Roll">
   <summer name="Roll Trim Sum">
      <input>fcs/aileron-cmd-norm</input>
      <input>fcs/roll-trim-cmd-norm</input>
      <clipto>
        <min> -1 </min>
        <max>  1 </max>
      </clipto>
   </summer>

   <aerosurface_scale name="Left Aileron Control">
      <input>fcs/roll-trim-sum</input>
      <range>
        <min> -0.35 </min>
        <max>  0.35 </max>
      </range>
      <output>fcs/left-aileron-pos-rad</output>
   </aerosurface_scale>

   <aerosurface_scale name="Right Aileron Control">
      <input>-fcs/roll-trim-sum</input>
      <range>
        <min> -0.35 </min>
        <max>  0.35 </max>
      </range>
      <output>fcs/right-aileron-pos-rad</output>
   </aerosurface_scale>

   <aerosurface_scale name="left aileron normalization">
      <input>fcs/left-aileron-pos-rad</input>
      <domain>
        <min> -0.35 </min>
        <max>  0.35 </max>
      </domain>
      <range>
        <min> -1 </min>
        <max>  1 </max>
      </range>
      <output>fcs/left-aileron-pos-norm</output>
   </aerosurface_scale>

   <aerosurface_scale name="right aileron normalization">
      <input>fcs/right-aileron-pos-rad</input>
      <domain>
        <min> -0.35 </min>
        <max>  0.35 </max>
      </domain>
      <range>
        <min> -1 </min>
        <max>  1 </max>
      </range>
      <output>fcs/right-aileron-pos-norm</output>
   </aerosurface_scale>

  </channel>

  <channel name="Yaw">
   <summer name="Rudder Command Sum">
      <input>fcs/rudder-cmd-norm</input>
      <input>fcs/yaw-trim-cmd-norm</input>
      <clipto>
        <min> -1. </min>
        <max>  1. </max>
      </clipto>
   </summer>

   <aerosurface_scale name="Rudder Control">
      <input>fcs/rudder-command-sum</input>
      <range>
        <min> -0.55 </min>
        <max>  0.55 </max>
      </range>
      <output>fcs/rudder-pos-rad</output>
   </aerosurface_scale>

   <aerosurface_scale name="rudder normalization">
      <input>fcs/rudder-pos-rad</input>
      <domain>
        <min> -0.55 </min>
        <max>  0.55 </max>
      </domain>
      <range>
        <min> -1 </min>
        <max>  1 </max>
      </range>
      <output>fcs/rudder-pos-norm</output>
   </aerosurface_scale>

  </channel>

<property value="0">fcs/caster-cmd</property>
<property value="-30">gear/unit/steering_gain</property>
  <channel name="Steering">

   <pure_gain name="caster enable">
      <input>fcs/caster-cmd</input>
      <gain>1</gain>
      <output>gear/unit/castered</output>
   </pure_gain>

   <pure_gain name="steering gain">
      <input>fcs/rudder-pos-norm</input>
      <gain>gear/unit/steering_gain</gain>
      <output>fcs/steer-pos-deg</output>
   </pure_gain>

  </channel>

  <channel name="Flaps">
   <kinematic name="Flaps Control">
     <input>fcs/flap-cmd-norm</input>
     <traverse>
       <setting>
          <position>  0 </position>
          <time>      0 </time>
       </setting>
       <setting>
          <position> 4.5 </position>
          <time>       .5 </time>
       </setting>
       <setting>
          <position> 15 </position>
          <time>      1 </time>
       </setting>
       <setting>
          <position> 42 </position>
          <time>      2 </time>
       </setting>
     </traverse>
     <output>fcs/flap-pos-deg</output>
   </kinematic>

   <aerosurface_scale name="flap normalization">
      <input>fcs/flap-pos-deg</input>
      <domain>
        <min>  0 </min>
        <max> 42 </max>
      </domain>
      <range>
        <min> 0 </min>
        <max> 1 </max>
      </range>
      <output>fcs/flap-pos-norm</output>
   </aerosurface_scale>

  </channel>

 </flight_control>

 <aerodynamics>
   <function name="aero/function/cos-alpha">
    <description>Cosine of alpha</description>
     <cos>
      <property>aero/alpha-rad</property>
     </cos>
   </function>

   <function name="aero/function/sin-alpha">
    <description>Sine of alpha</description>
     <sin>
      <property>aero/alpha-rad</property>
     </sin>
   </function>

   <function name="aero/function/cos-beta">
    <description>Cosine of beta</description>
     <cos>
      <property>aero/beta-rad</property>
     </cos>
   </function>

   <function name="aero/function/sin-beta">
    <description>Sine of beta</description>
     <sin>
      <property>aero/beta-rad</property>
     </sin>
   </function>

   <function name="aero/function/cos2-alpha">
    <description>Cosine Squared of alpha</description>
     <product>
      <property>aero/function/cos-alpha</property>
      <property>aero/function/cos-alpha</property>
     </product>
   </function>

   <function name="aero/function/scos2-alpha">
    <description>Signed Cosine Squared of alpha</description>
     <product>
      <abs><property>aero/function/cos-alpha</property></abs>
      <property>aero/function/cos-alpha</property>
     </product>
   </function>

  <function name="aero/function/velocity-induced-fps">
   <description> velocity including the propulsion induced velocity.</description>
   <sum>
    <property>velocities/u-aero-fps</property>
    <property>propulsion/engine/prop-induced-velocity_fps</property>
    <property>propulsion/engine/prop-induced-velocity_fps</property>
   </sum>
  </function>

  <function name="aero/function/qbar-induced-psf">
   <description> q bar including the propulsion induced velocity.</description>
   <product>
    <property>aero/function/velocity-induced-fps</property>
    <property>aero/function/velocity-induced-fps</property>
    <property>atmosphere/rho-slugs_ft3</property>
    <value>0.5</value>
   </product>
  </function>

  <function name="aero/function/kCDge">
    <description>Change_in_drag_due_to_ground_effect</description>
    <product>
      <table>
        <independentVar>aero/h_b-mac-ft</independentVar>
        <tableData>
          0.0000	0.4800
          0.1000	0.5150
          0.1500	0.6290
          0.2000	0.7090
          0.3000	0.8150
          0.4000	0.8820
          0.5000	0.9280
          0.6000	0.9620
          0.7000	0.9880
          0.8000	1.0000
          0.9000	1.0000
          1.0000	1.0000
          1.1000	1.0000
       </tableData>
      </table>
    </product>
  </function>

  <function name="aero/function/kCLge">
    <description>Change_in_lift_due_to_ground_effect</description>
    <product>
      <table>
        <independentVar>aero/h_b-mac-ft</independentVar>
        <tableData>
           0.0000	1.2030
           0.1000	1.1270
           0.1500	1.0900
           0.2000	1.0730
           0.3000	1.0460
           0.4000	1.0550
           0.5000	1.0190
           0.6000	1.0130
           0.7000	1.0080
           0.8000	1.0060
           0.9000	1.0030
           1.0000	1.0020
           1.1000	1.0000
        </tableData>
      </table>
    </product>
  </function>

  <axis name="LIFT">

    <function name="aero/coefficient/CLalpha">
      <description>Lift_due_to_alpha</description>
      <product>
          <property>aero/qbar-psf</property>
          <property>metrics/Sw-sqft</property>
          <property>aero/function/kCLge</property>
          <table>
            <independentVar lookup="row">aero/alpha-rad</independentVar>
            <tableData>
              -3.142 0.05
              -1.57  0.
              -0.75 -0.5
              -0.20 -0.750
               0.00  0.250
               0.23  1.400
               0.60  0.710
               0.75  1.0
               1.57  0.
               3.142 0.05
            </tableData>
          </table>
      </product>
    </function>

    <function name="aero/coefficient/dCLflap">
       <description>Delta_Lift_due_to_flaps</description>
       <product>
           <property>aero/qbar-psf</property>
           <property>metrics/Sw-sqft</property>
           <property>fcs/flap-pos-deg</property>
           <property>aero/function/kCLge</property>
           <property>aero/function/cos-alpha</property>
           <value> 0.01333 </value>
       </product>
    </function>

    <function name="aero/coefficient/CLde">
       <description>Lift_due_to_Elevator_Deflection</description>
       <product>
           <property>aero/qbar-psf</property>
           <property>metrics/Sw-sqft</property>
           <property>fcs/elevator-pos-rad</property>
           <property>aero/function/cos-alpha</property>
           <value>0.2</value>
       </product>
    </function>

  </axis>

  <axis name="DRAG">

    <function name="aero/coefficient/CD0">
       <description>Drag_at_zero_lift</description>
       <product>
          <property>aero/qbar-psf</property>
          <property>metrics/Sw-sqft</property>
          <table>
            <independentVar lookup="row">aero/alpha-rad</independentVar>
            <tableData>
             -3.142      0.06
             -1.57       1.530
             -0.26       0.061
              0.00       0.054
              0.26       0.061
              1.57       1.530
              3.142      0.06
            </tableData>
          </table>
       </product>
    </function>

    <function name="aero/coefficient/CDi">
       <description>Induced_drag</description>
         <product>
           <property>aero/qbar-psf</property>
           <property>metrics/Sw-sqft</property>
           <property>aero/cl-squared</property>
           <value>0.03</value>
         </product>
    </function>

    <function name="aero/coefficient/CDmach">
       <description>Drag_due_to_mach</description>
        <product>
          <property>aero/qbar-psf</property>
          <property>metrics/Sw-sqft</property>
          <table>
            <independentVar lookup="row">velocities/mach</independentVar>
            <tableData>
                0.00      0.000
                0.7       0.000
                1.10      0.023
                1.80      0.015
            </tableData>
          </table>
        </product>
    </function>

    <function name="aero/coefficient/CDflap">
       <description>Drag_due_to_flaps</description>
         <product>
           <property>aero/function/cos2-alpha</property>
           <property>aero/qbar-psf</property>
           <property>metrics/Sw-sqft</property>
           <property>fcs/flap-pos-deg</property>
           <value> 0.00100 </value>
         </product>
    </function>

    <function name="aero/coefficient/CDbeta">
       <description>Drag_due_to_sideslip</description>
       <product>
          <property>aero/qbar-psf</property>
          <property>metrics/Sw-sqft</property>
          <table>
            <independentVar lookup="row">aero/beta-rad</independentVar>
            <tableData>
              -3.142      0.006
              -1.57       1.230
              -0.26       0.050
               0.00       0.000
               0.26       0.050
               1.57       1.230
               3.142      0.006
            </tableData>
          </table>
       </product>
    </function>

    <function name="aero/coefficient/CDde">
       <description>Drag_due_to_Elevator_Deflection</description>
       <product>
           <property>aero/qbar-psf</property>
           <property>metrics/Sw-sqft</property>
           <property>fcs/mag-elevator-pos-rad</property>
           <property>aero/function/cos2-alpha</property>
           <value>0.04</value>
       </product>
    </function>

  </axis>

  <axis name="SIDE">

    <function name="aero/coefficient/CYb">
       <description>Side_force_due_to_beta</description>
       <product>
           <property>aero/qbar-psf</property>
           <property>metrics/Sw-sqft</property>
           <property>aero/function/sin-beta</property>
           <value>-1</value>
       </product>
    </function>

  </axis>

  <axis name="ROLL">

    <function name="aero/coefficient/Clb">
       <description>Roll_moment_due_to_beta</description>
       <product>
           <property>aero/qbar-psf</property>
           <property>metrics/Sw-sqft</property>
           <property>metrics/bw-ft</property>
           <property>aero/function/sin-beta</property>
           <value>-0.1</value>
       </product>
    </function>

    <function name="aero/coefficient/Clp">
       <description>Roll_moment_due_to_roll_rate</description>
       <product>
           <property>aero/qbar-psf</property>
           <property>metrics/Sw-sqft</property>
           <property>metrics/bw-ft</property>
           <property>aero/bi2vel</property>
           <property>velocities/p-aero-rad_sec</property>
           <value>-0.4</value>
       </product>
    </function>

    <function name="aero/coefficient/Clr">
       <description>Roll_moment_due_to_yaw_rate</description>
       <product>
           <property>aero/qbar-psf</property>
           <property>metrics/Sw-sqft</property>
           <property>metrics/bw-ft</property>
           <property>aero/bi2vel</property>
           <property>velocities/r-aero-rad_sec</property>
           <value>0.15</value>
       </product>
    </function>

    <function name="aero/coefficient/Clda">
       <description>Roll_moment_due_to_aileron</description>
       <product>
          <property>aero/qbar-psf</property>
          <property>metrics/Sw-sqft</property>
          <property>metrics/bw-ft</property>
          <property>fcs/left-aileron-pos-rad</property>
          <property>aero/function/cos-alpha</property>
          <table>
            <independentVar lookup="row">velocities/mach</independentVar>
            <tableData>
              0.0    0.170
              2.0    0.057
            </tableData>
          </table>
       </product>
    </function>

    <function name="aero/coefficient/Cldr">
       <description>Roll_moment_due_to_rudder</description>
       <product>
           <property>aero/function/qbar-induced-psf</property>
           <property>metrics/Sw-sqft</property>
           <property>metrics/bw-ft</property>
           <property>fcs/rudder-pos-rad</property>
           <value>0.01</value>
       </product>
    </function>

  </axis>

  <axis name="PITCH">

    <function name="aero/coefficient/Cmalpha">
       <description>Pitch_moment_due_to_alpha</description>
       <product>
           <property>aero/qbar-psf</property>
           <property>metrics/Sw-sqft</property>
           <property>metrics/cbarw-ft</property>
           <property>aero/function/sin-alpha</property>
           <value>-0.5</value>
       </product>
    </function>

    <function name="aero/coefficient/Cmde">
       <description>Pitch_moment_due_to_elevator</description>
       <product>
          <property>aero/function/qbar-induced-psf</property>
          <property>metrics/Sw-sqft</property>
          <property>metrics/cbarw-ft</property>
          <property>fcs/elevator-pos-rad</property>
          <table>
            <independentVar lookup="row">velocities/mach</independentVar>
            <tableData>
              0.0     -1.100
              2.0     -0.275
            </tableData>
          </table>
       </product>
    </function>

    <function name="aero/coefficient/Cmq">
       <description>Pitch_moment_due_to_pitch_rate</description>
       <product>
           <property>aero/qbar-psf</property>
           <property>metrics/Sw-sqft</property>
           <property>metrics/cbarw-ft</property>
           <property>aero/ci2vel</property>
           <property>velocities/q-aero-rad_sec</property>
           <value>-12</value>
       </product>
    </function>

    <function name="aero/coefficient/Cmadot">
       <description>Pitch_moment_due_to_alpha_rate</description>
       <product>
           <property>aero/qbar-psf</property>
           <property>metrics/Sw-sqft</property>
           <property>metrics/cbarw-ft</property>
           <property>aero/ci2vel</property>
           <property>aero/alphadot-rad_sec</property>
           <value>-7</value>
       </product>
    </function>

  </axis>

  <axis name="YAW">

    <function name="aero/coefficient/Cnb">
       <description>Yaw_moment_due_to_beta</description>
       <product>
           <property>aero/qbar-psf</property>
           <property>metrics/Sw-sqft</property>
           <property>metrics/bw-ft</property>
           <property>aero/function/sin-beta</property>
           <value>0.12</value>
       </product>
    </function>

    <function name="aero/coefficient/Cnr">
       <description>Yaw_moment_due_to_yaw_rate</description>
       <product>
           <property>aero/qbar-psf</property>
           <property>metrics/Sw-sqft</property>
           <property>metrics/bw-ft</property>
           <property>aero/bi2vel</property>
           <property>velocities/r-aero-rad_sec</property>
           <value>-0.15</value>
       </product>
    </function>

    <function name="aero/coefficient/Cndr">
       <description>Yaw_moment_due_to_rudder</description>
       <product>
           <property>aero/function/cos-alpha</property>
           <property>aero/qbar-psf</property>
           <property>metrics/Sw-sqft</property>
           <property>metrics/bw-ft</property>
           <property>fcs/rudder-pos-rad</property>
           <value>-0.1</value>
       </product>
    </function>

    <function name="aero/coefficient/Cnda">
       <description>Adverse_yaw</description>
       <product>
           <property>aero/function/cos-alpha</property>
           <property>aero/qbar-psf</property>
           <property>metrics/Sw-sqft</property>
           <property>metrics/bw-ft</property>
           <property>fcs/left-aileron-pos-rad</property>
           <value>-0.01</value>
       </product>
    </function>

  </axis>

 </aerodynamics>

</fdm_config>
